*Heading
** Job name: Test_Cyclic Model name: Model-1
** Generated by: Abaqus/CAE 2018
*Preprint, echo=NO, model=NO, history=NO, contact=NO
**
** PARTS
**
*Part, name=Body
*Node
      1,          15.,          15.
      2,        14.75,          15.
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*Element, type=CPS8R
    1,     1,     2,   123,   122, 14642, 14643, 14644, 14645
    2,     2,     3,   124,   123, 14646, 14647, 14648, 14643
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*Nset, nset=Body, generate
     1,  43681,      1
*Elset, elset=Body, generate
     1,  14400,      1
** Section: Body
*Solid Section, elset=Body, material=Skin
1.,
*End Part
**
**
** ASSEMBLY
**
*Assembly, name=Assembly
**
*Instance, name=Body-1, part=Body
*End Instance
**
*Nset, nset=Bottom, instance=Body-1
 14521, 14522, 14523, 14524, 14525, 14526
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*Nset, nset=Left, instance=Body-1
   121,   242,   363,   484,   605,   726
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*Nset, nset=Right, instance=Body-1
     1,   122,   243,   364,   485,   606
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*Nset, nset=Top, instance=Body-1
     1,     2,     3,     4,     5,     6
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*End Assembly
*Amplitude, name=Cylic_Loading
             0.,              0.,             20.,             0.6,             40.,              0.,             60.,             0.8
            80.,              0.,            100.,              1.,            120.,              0.
**
** MATERIALS
**
*Material, name=Skin
*Density
 1e-09,
*Depvar
11
*User Material, constants = 10
 0.0024, 9.2,  1.16, 0.0, 1.36577,    0.66,    13.14,    0.04,
 0.5,     1.00
** ----------------------------------------------------------------
**
*USER OUTPUT VARIABLES
11,
** STEP: Step-1
**
*Step, name=Step-1, nlgeom=YES, inc=1000
*Static
0.1, 120., 1e-08, 1.
**
** BOUNDARY CONDITIONS
**
** Name: Bottom_Fixed Type: Symmetry/Antisymmetry/Encastre
*Boundary
Bottom, YSYMM
** Name: Left_Fixed Type: Symmetry/Antisymmetry/Encastre
*Boundary
Left, XSYMM
** Name: Right_Disp Type: Displacement/Rotation
*Boundary, amplitude=Cylic_Loading
Right, 1, 1, 15.
** Name: Top_Disp Type: Displacement/Rotation
*Boundary, amplitude=Cylic_Loading
Top, 2, 2, 15.
**
** OUTPUT REQUESTS
**
*Restart, write, frequency=0
**
** FIELD OUTPUT: F-Output-1
**
*Output, field, variable=PRESELECT, time interval=0.25
*Element Output, directions=YES
UVARM1, UVARM2, UVARM3, UVARM4, UVARM5,
UVARM6, UVARM7, UVARM8, UVARM9, UVARM10, UVARM11
**
** HISTORY OUTPUT: H-Output-1
**
*Output, history, variable=PRESELECT
*End Step
