*Heading
** Job name: 2D_UMAT_original Model name: Model-1
** Generated by: Abaqus/CAE 2018
*Preprint, echo=NO, model=NO, history=NO, contact=NO
**
** PARTS
**
*Part, name=Part-1
*Node
      1,          15.,          15.
      2,          14.,          15.
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*Element, type=CPS4R
  1,   1,   2,  33,  32
  2,   2,   3,  34,  33
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*Nset, nset=Whole, generate
   1,  961,    1
*Elset, elset=Whole, generate
   1,  900,    1
** Section: Mat_Section
*Solid Section, elset=Whole, controls=EC-1, material=Material_Skin
1.,
*End Part
**
**
** ASSEMBLY
**
*Assembly, name=Assembly
**
*Instance, name=Part-1-1, part=Part-1
*End Instance
**
*Nset, nset=Bottom_Nodes, instance=Part-1-1, generate
 931,  961,    1
*Nset, nset=Left_Nodes, instance=Part-1-1, generate
  31,  961,   31
*Nset, nset=Right_Nodes, instance=Part-1-1, generate
   1,  931,   31
*Nset, nset=Top_Nodes, instance=Part-1-1, generate
  1,  31,   1
*End Assembly
**
** ELEMENT CONTROLS
**
*Section Controls, name=EC-1, hourglass=ENHANCED
1., 1., 1.
**
** MATERIALS
**
*Material, name=Material_Skin
*Density
 1e-09,
*Depvar
11
*User Material, constants = 10
0.0024, 9.2,  1.16, 0.0, 1.36577,    0.66,    13.14,    0.04,
 0.5,     1.00
** ----------------------------------------------------------------
**
*USER OUTPUT VARIABLES
11,
** STEP: Static Time
**
*Step, name="Static Time", nlgeom=YES, inc=1000
*Static
0.001, 20., 1e-08, 0.1
**
** BOUNDARY CONDITIONS
**
** Name: Disp_Left Type: Displacement/Rotation
*Boundary
Left_Nodes, 1, 1, -15.
** Name: Disp_Top Type: Displacement/Rotation
*Boundary
Top_Nodes, 2, 2, 15.
** Name: Fix_Right Type: Symmetry/Antisymmetry/Encastre
*Boundary
Right_Nodes, YASYMM
** Name: Fix_Top Type: Symmetry/Antisymmetry/Encastre
*Boundary
Top_Nodes, ZSYMM
** Name: Fixed_Bottom Type: Symmetry/Antisymmetry/Encastre
*Boundary
Bottom_Nodes, XASYMM
** Name: Fixed_Left Type: Symmetry/Antisymmetry/Encastre
*Boundary
Left_Nodes, ZSYMM
**
** OUTPUT REQUESTS
**
*Restart, write, frequency=0
**
** FIELD OUTPUT: F-Output-1
**
*Output, field, variable=PRESELECT, time interval=0.05
*Element Output, directions=YES
UVARM1, UVARM2, UVARM3, UVARM4, UVARM5,
UVARM6, UVARM7, UVARM8, UVARM9, UVARM10, UVARM11
**
** HISTORY OUTPUT: H-Output-1
**
*Output, history, variable=PRESELECT
*End Step
