*Heading
** Job name: 3D_UMAT Model name: Model-1
** Generated by: Abaqus/CAE 2018
*Preprint, echo=NO, model=NO, history=NO, contact=NO
**
** PARTS
**
*Part, name=Body
*Node
      1,         -15.,         -15.,           1.
      2,         -15.,         -14.,           1.
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*Element, type=C3D8RH
  1,   63,   64,   95,   94,    1,    2,   33,   32
  2,   64,   65,   96,   95,    2,    3,   34,   33
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*Nset, nset=Body, generate
    1,  1922,     1
*Elset, elset=Body, generate
   1,  900,    1
*Elset, elset=_Whole_body_S1, internal, generate
 871,  900,    1
*Elset, elset=_Whole_body_S6, internal, generate
   1,  871,   30
*Elset, elset=_Whole_body_S2, internal, generate
  1,  30,   1
*Elset, elset=_Whole_body_S4, internal, generate
  30,  900,   30
*Elset, elset=_Whole_body_S3, internal, generate
   1,  900,    1
*Elset, elset=_Whole_body_S5, internal, generate
   1,  900,    1
*Surface, type=ELEMENT, name=Whole_body
_Whole_body_S1, S1
_Whole_body_S6, S6
_Whole_body_S2, S2
_Whole_body_S4, S4
_Whole_body_S3, S3
_Whole_body_S5, S5
** Section: Body
*Solid Section, elset=Body, controls=EC-1, material=Material_Skin
1.,
*End Part
**
**
** ASSEMBLY
**
*Assembly, name=Assembly
**
*Instance, name=Body-1, part=Body
*End Instance
**
*Nset, nset=Bottom, instance=Body-1, generate
    1,  1892,    31
*Nset, nset=Left, instance=Body-1, generate
  1,  62,   1
*Nset, nset=Right, instance=Body-1, generate
 1861,  1922,     1
*Nset, nset=Set-10, instance=Body-1
   32,   33,   34,   35,   36,   37
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*Elset, elset=Set-10, instance=Body-1
   1,   2,   3,   4,   5,   6
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*Nset, nset=Top, instance=Body-1, generate
   31,  1922,    31
*End Assembly
**
** ELEMENT CONTROLS
**
*Section Controls, name=EC-1, hourglass=ENHANCED
1., 1., 1.
**
** MATERIALS
**
*Material, name=Material_Skin
*Density
 1e-09,
*Depvar
11
*User Material, constants = 10
0.0024, 9.2,  1.16, 0.0, 1.36577,    0.66,    13.14,    0.04,
 0.5,     1.00
** ----------------------------------------------------------------
**
*USER OUTPUT VARIABLES
11,
** STEP: Step-1
**
*Step, name=Step-1, nlgeom=YES, inc=10000
*Static
0.001, 20., 1e-08, 1
**
** BOUNDARY CONDITIONS
**
** Name: Fixed_Bottom Type: Symmetry/Antisymmetry/Encastre
*Boundary
Bottom, YSYMM
** Name: Fixed_Right Type: Symmetry/Antisymmetry/Encastre
*Boundary
Right, XSYMM
** Name: Fixed_Z Type: Symmetry/Antisymmetry/Encastre
*Boundary
Set-10, ZSYMM
** Name: Left_Disp Type: Displacement/Rotation
*Boundary
Left, 1, 1, -15.
** Name: Top_Disp Type: Displacement/Rotation
*Boundary
Top, 2, 2, 15.
**
** OUTPUT REQUESTS
**
*Restart, write, frequency=0
**
** FIELD OUTPUT: F-Output-1
**
*Output, field, variable=PRESELECT, number interval=200
*Element Output, directions=YES
UVARM1, UVARM2, UVARM3, UVARM4, UVARM5,
UVARM6, UVARM7, UVARM8, UVARM9, UVARM10, UVARM11
**
** HISTORY OUTPUT: H-Output-1
**
*Output, history, variable=PRESELECT
*End Step
