*Heading
** Job name: Z_INPUT Model name: Model-1
** Generated by: Abaqus/CAE 2018.HF2
*Preprint, echo=NO, model=NO, history=NO, contact=NO
**
** PARTS
**
*Part, name=blood_clot
*Node
      1,           7.,   5.00099993
      2,         -20.,   5.00099993
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*Element, type=COH2D4
  1,    1,   19, 1096,    4
  2,   19,   20, 1095, 1096
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*Element, type=CPS4R
 541,     5,  1097,  6509,  2708
 542,  1097,  1098,  6510,  6509
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*Nset, nset=blood_clot_upper
     1,     2,     5,     6,     7,     8
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*Elset, elset=blood_clot_upper, generate
   541,  22940,      1
*Nset, nset=blood_clot_lower
     3,     4,    12,    13,    14,    15
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*Elset, elset=blood_clot_lower, generate
 22941,  45340,      1
*Nset, nset=cohesive
    1,    2,    3,    4,   19,   20
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*Elset, elset=cohesive, generate
   1,  540,    1
*Nset, nset=top
    7,    8, 1903, 1904, 1905, 1906
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*Elset, elset=top, generate
   541,  22940,      1
*Nset, nset=bot
   17,   18, 5675, 5676, 5677, 5678
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*Elset, elset=bot, generate
 22941,  45340,      1
** Section: blood_clot
*Solid Section, elset=blood_clot_upper, controls=EC-1, material=blood_clot
, 3.
** Section: blood_clot
*Solid Section, elset=blood_clot_lower, controls=EC-1, material=blood_clot
, 3.
** Section: cohesive
*Cohesive Section, elset=cohesive, controls=EC-1, material=cohesive, response=TRACTION SEPARATION
, 3.
*End Part
**
*Part, name=point
*Node
      1,           0.,          15.,           0.
*Nset, nset=point-RefPt_, internal
1,
*End Part
**
**
** ASSEMBLY
**
*Assembly, name=Assembly
**
*Instance, name=blood_clot-1, part=blood_clot
*End Instance
**
*Instance, name=point-1, part=point
*End Instance
**
*Nset, nset=RF_2, instance=point-1
 1,
*Nset, nset=TOP_RF, instance=blood_clot-1
    7,    8, 1903, 1904, 1905, 1906
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*Surface, type=NODE, name=TOP_RF_CNS_, internal
TOP_RF, 1.
** Constraint: Constraint-1
*MPC
TIE, TOP_RF, RF_2
*End Assembly
**
** ELEMENT CONTROLS
**
*Section Controls, name=EC-1, hourglass=ENHANCED, second order accuracy=YES
1., 1., 1.
*Section Controls, name=EC-2, ELEMENT DELETION=YES
1., 1., 1.
**
** MATERIALS
**
*Material, name=cohesive
*Damage Initiation, criterion=QUADS
 0.0231, 0.0231, 0.0231
*Damage Evolution, type=DISPLACEMENT
 0.973,
*Density
 1e-9,
*Elastic, type=TRACTION
 3, 3, 3
*Material, name=blood_clot
*Density
 1e-09,
*Depvar
11
*User Material, constants = 10
0.0024, 9.2,  1.16,  0, 1.36577,    0.98,    13.14,    0.04,
 0.2,     1.00
** ----------------------------------------------------------------
**
*USER OUTPUT VARIABLES
11,
** STEP: pure-shear
**
*Step, name=pure-shear, nlgeom=YES, inc=100000
*Static, stabilize=0.0002, allsdtol=0.05, continue=NO
0.01, 20., 1e-20, 0.1
**
** BOUNDARY CONDITIONS
**
** Name: fix_point Type: Displacement/Rotation
*Boundary
RF_2, 1, 1
** Name: bot-u Type: Displacement/Rotation
*Boundary
blood_clot-1.bot, 1, 1
** Name: bot-v Type: Velocity/Angular velocity
*Boundary, type=VELOCITY
blood_clot-1.bot, 2, 2, -0.20
** Name: vel_point Type: Velocity/Angular velocity
*Boundary, type=VELOCITY
RF_2, 2, 2, 0.20
**
** CONTROLS
**
*Controls, reset
*Controls, parameters=time incrementation
, , , , , , , 25, , ,
** OUTPUT REQUESTS
**
*Restart, write, number interval=1, time marks=NO
**
** FIELD OUTPUT: F-Output-1
**
*Output, field, variable=PRESELECT, time interval=0.05
*Node Output
A, RF, U, V
*Element Output, directions=YES
DMENER, E, EDMDDEN, ELDMD, LE, NE, PE, S, SDEG, STATUS,
UVARM1, UVARM2, UVARM3, UVARM4, UVARM5,
UVARM6, UVARM7, UVARM8, UVARM9, UVARM10, UVARM11
**
** HISTORY OUTPUT: H-Output-1
**
*Output, history, time interval=0.05
*Node Output, nset=RF_2
RF2, U2
**
**
** HISTORY OUTPUT: H-Output-3
**
*Output, history
*Energy Output
ALLAE, ALLCD, ALLDMD, ALLSE, ALLVD, ALLWK, ETOTAL
*End Step
